// COMSOL Multiphysics 6.1.0.357 model "test_geom.mph"
// Outline of the model tree

Parameters
  k = 0
  a = 4.6125e-07[m]
  kx = if(k<1,pi/a*k,if(k<2,pi/a,(3-k)*pi/a))
  ky = if(k<1,0,if(k<2,(k-1)*pi/a,(3-k)*pi/a))

Geometry
  geom1 "Geometry 1" (3D, length unit m)
    wp1: WorkPlane | unite = on
      sq1: Square | base = center; size = 4.6125e-07
      r1: Rectangle | base = center; size = {3.6855E-7, 9.7375e-08}
      r2: Rectangle | base = center; size = {9.7375e-08, 3.6855E-7}
      dif1: Difference | input = sq1; input2 = r1, r2
      fil1: Fillet | point = dif1(1) points 3-5, 8, 9, 12-14; radius = 1.0E-8
      fil2: Fillet | point = fil1(1) points 8, 9, 16, 17; radius = 1.0E-8
    ext1: Extrude | workplane = wp1; input = wp1; distance = 8.0E-8
    fin: Finalize "Form Union"

Materials
  diamond: Common on domains 1
    def "Basic"
      density = 3500
    AnisotropicVoGrp "Anisotropic, Voigt notation"
      DVo = {1.1785E12, 2.25E10, 1.25E11, 0, 0, 6.27146914667e-06, 2.25E10, 1.1785E12, 1.25E11, 0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}
      eta_DVo = {0, 0, 0, 0, 0, 0, 0, 0, 0, 0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}

Physics
  smech: SolidMechanics on domains 1
    dependent variable u = {u, v, w}
    lemm1: LinearElasticModel "Linear Elastic Material 1" (default)
      SolidModel = Anisotropic
      AnisotropicOption = AnisotropicVo
      DVo_mat = from_mat
      rho_mat = from_mat
    free1: Free (default)
    init1: init "Initial Values 1" (default)
    pbcX: PeriodicCondition "Periodic BC, x-direction" on boundaries 1, 30
      PeriodicType = Floquet
      kFloquet = {kx, ky, 0}
      manualDestinationSelection = 1
      destinationDomains: boundaries 30
    pbcY: PeriodicCondition "Periodic BC, y-direction" on boundaries 2, 5
      PeriodicType = Floquet
      kFloquet = {kx, ky, 0}
      manualDestinationSelection = 1
      destinationDomains: boundaries 5
    symBCs: SymmetrySolid "Symmetric BC" on boundaries 3
    asymBCs: Antisymmetry "Anti-symmetric BC" on no boundaries

Mesh
  mesh (physics-controlled)

Studies
  study
    std_param: Parametric "Parametric Sweep" | pname = k; plistarr = range(0,1/1,3-1/1)
    std_eigv: Eigenfrequency | neigs = 6.0; shift = 0

Solver configurations
  solv "Solution" (study study)
    solv_vars: Variables "Dependent Variables"
    solv_eigv: Eigenvalue "Eigenvalue Solver" | transform = eigenfrequency
      dDef: Direct | linsolver = spooles
  psolv "Solution 2" (study study)

Datasets
  dset1: Solution | solution = solv
  dset2: Solution | solution = psolv